** Этап 0: проверка контакта с удалением элементов (mode=contact)
** сгенерировано tools/mksmoke.py --E 90500.0 --K 653.0 --clear 0.0 --ctype n2s --dt0 0.01 --dtmax 0.02 --dtmin 1e-07 --e0 0.007 --epsf 0.1 --gap 2.0 --h 2.0 --kpen 1000000.0 --kstick 100000.0 --maxinc 20000 --mode contact --mu 0.1 --n 0.082 --nphi 12 --nr 4 --nu 0.35 --nz 5 --outfreq 10 --ri 5.5 --ro 6.3 --rseg_in 4.5 --sector 22.5 --seg_over 0.5 --uf 0.03 --ur 1.5
*Node
1, 5.500000000, 0.000000000, 0.000000000
2, 5.500000000, 0.000000000, 0.200000000
3, 5.500000000, 0.000000000, 0.400000000
4, 5.500000000, 0.000000000, 0.600000000
5, 5.500000000, 0.000000000, 0.800000000
6, 5.500000000, 0.000000000, 1.000000000
7, 5.497055231, 0.179954956, 0.000000000
8, 5.497055231, 0.179954956, 0.200000000
9, 5.497055231, 0.179954956, 0.400000000
10, 5.497055231, 0.179954956, 0.600000000
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*Element, Type=C3D4, Elset=RING
1, 1, 79, 85, 86
2, 1, 85, 7, 86
3, 1, 7, 8, 86
4, 1, 8, 2, 86
5, 1, 2, 80, 86
6, 1, 80, 79, 86
7, 2, 80, 86, 87
8, 2, 86, 8, 87
9, 2, 8, 9, 87
10, 2, 9, 3, 87
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*Element, Type=C3D8, Elset=SEGMENT
1441, 391, 412, 415, 394, 392, 413, 416, 395
1442, 392, 413, 416, 395, 393, 414, 417, 396
1443, 394, 415, 418, 397, 395, 416, 419, 398
1444, 395, 416, 419, 398, 396, 417, 420, 399
1445, 397, 418, 421, 400, 398, 419, 422, 401
1446, 398, 419, 422, 401, 399, 420, 423, 402
1447, 400, 421, 424, 403, 401, 422, 425, 404
1448, 401, 422, 425, 404, 402, 423, 426, 405
1449, 403, 424, 427, 406, 404, 425, 428, 407
1450, 404, 425, 428, 407, 405, 426, 429, 408
1451, 406, 427, 430, 409, 407, 428, 431, 410
1452, 407, 428, 431, 410, 408, 429, 432, 411
1453, 412, 433, 436, 415, 413, 434, 437, 416
1454, 413, 434, 437, 416, 414, 435, 438, 417
1455, 415, 436, 439, 418, 416, 437, 440, 419
1456, 416, 437, 440, 419, 417, 438, 441, 420
1457, 418, 439, 442, 421, 419, 440, 443, 422
1458, 419, 440, 443, 422, 420, 441, 444, 423
1459, 421, 442, 445, 424, 422, 443, 446, 425
1460, 422, 443, 446, 425, 423, 444, 447, 426
1461, 424, 445, 448, 427, 425, 446, 449, 428
1462, 425, 446, 449, 428, 426, 447, 450, 429
1463, 427, 448, 451, 430, 428, 449, 452, 431
1464, 428, 449, 452, 431, 429, 450, 453, 432
*Nset, Nset=RING_INNER
1, 2, 3, 4, 5, 6, 7, 8, 9, 10
11, 12, 13, 14, 15, 16, 17, 18, 19, 20
21, 22, 23, 24, 25, 26, 27, 28, 29, 30
31, 32, 33, 34, 35, 36, 37, 38, 39, 40
41, 42, 43, 44, 45, 46, 47, 48, 49, 50
51, 52, 53, 54, 55, 56, 57, 58, 59, 60
61, 62, 63, 64, 65, 66, 67, 68, 69, 70
71, 72, 73, 74, 75, 76, 77, 78
*Nset, Nset=PHI0
1, 2, 3, 4, 5, 6, 79, 80, 81, 82
83, 84, 157, 158, 159, 160, 161, 162, 235, 236
237, 238, 239, 240, 313, 314, 315, 316, 317, 318
*Nset, Nset=PHI1
73, 74, 75, 76, 77, 78, 151, 152, 153, 154
155, 156, 229, 230, 231, 232, 233, 234, 307, 308
309, 310, 311, 312, 385, 386, 387, 388, 389, 390
*Nset, Nset=ZBOT
1, 7, 13, 19, 25, 31, 37, 43, 49, 55
61, 67, 73, 79, 85, 91, 97, 103, 109, 115
121, 127, 133, 139, 145, 151, 157, 163, 169, 175
181, 187, 193, 199, 205, 211, 217, 223, 229, 235
241, 247, 253, 259, 265, 271, 277, 283, 289, 295
301, 307, 313, 319, 325, 331, 337, 343, 349, 355
361, 367, 373, 379, 385
*Nset, Nset=SEGNODES
391, 392, 393, 394, 395, 396, 397, 398, 399, 400
401, 402, 403, 404, 405, 406, 407, 408, 409, 410
411, 412, 413, 414, 415, 416, 417, 418, 419, 420
421, 422, 423, 424, 425, 426, 427, 428, 429, 430
431, 432, 433, 434, 435, 436, 437, 438, 439, 440
441, 442, 443, 444, 445, 446, 447, 448, 449, 450
451, 452, 453
*Material, Name=E635
*Elastic
90500, 0.35
*Plastic
434.7, 0.0000
443.8, 0.0020
467.5, 0.0100
485.6, 0.0200
516.3, 0.0500
543.7, 0.1000
573.9, 0.2000
592.7, 0.3000
617.6, 0.5000
653.4, 1.0000
*Damage Initiation, Criterion=Ductile, Evolution=Displacement, Npoints=2
1.0, 0.03, 0.0, 0.1, 1.5, 0.1
*Solid Section, Elset=RING, Material=E635
*Material, Name=STEEL
*Elastic
210000., 0.3
*Solid Section, Elset=SEGMENT, Material=STEEL
*Surface, Name=SLAVE, Type=Element
3, S1
4, S1
9, S1
10, S1
15, S1
16, S1
21, S1
22, S1
27, S1
28, S1
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*Surface, Name=SLAVENODES, Type=Node
RING_INNER
*Surface, Name=MASTER, Type=Element
1453, S4
1454, S4
1455, S4
1456, S4
1457, S4
1458, S4
1459, S4
1460, S4
1461, S4
1462, S4
1463, S4
1464, S4
*Surface Interaction, Name=SI
*Surface Behavior, Pressure-Overclosure=Linear
1e+06
*Friction
0.1, 100000
*Contact Pair, Interaction=SI, Type=Node to Surface
SLAVENODES, MASTER
*Equation
2
73, 2, 0.923879532511, 73, 1, -0.382683432365
2
74, 2, 0.923879532511, 74, 1, -0.382683432365
2
75, 2, 0.923879532511, 75, 1, -0.382683432365
2
76, 2, 0.923879532511, 76, 1, -0.382683432365
2
77, 2, 0.923879532511, 77, 1, -0.382683432365
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*Step, Nlgeom, Inc=20000
*Static
0.01, 1., 1e-07, 0.02
*Boundary
PHI0, 2, 2, 0.
ZBOT, 3, 3, 0.
SEGNODES, 1, 1, 1.5
SEGNODES, 2, 3, 0.
*Output, Frequency=10
*Node File
U, RF
*El File
S, E, PEEQ, SDV
*Node Print, Nset=SEGNODES, Totals=Only
RF
*End Step
