** Этап 0: проверка контакта с удалением элементов (mode=disp)
** сгенерировано tools/mksmoke.py --E 90500.0 --K 653.0 --clear 0.0 --dt0 0.01 --dtmax 0.02 --dtmin 1e-07 --e0 0.007 --epsf 0.1 --gap 2.0 --h 2.0 --kpen 1000000.0 --kstick 100000.0 --maxinc 20000 --mode disp --mu 0.1 --n 0.082 --nphi 12 --nr 4 --nu 0.35 --nz 5 --outfreq 10 --ri 5.5 --ro 6.3 --rseg_in 4.5 --sector 22.5 --seg_over 0.5 --uf 0.03 --ur 1.5
*Node
1, 5.500000000, 0.000000000, 0.000000000
2, 5.500000000, 0.000000000, 0.200000000
3, 5.500000000, 0.000000000, 0.400000000
4, 5.500000000, 0.000000000, 0.600000000
5, 5.500000000, 0.000000000, 0.800000000
6, 5.500000000, 0.000000000, 1.000000000
7, 5.497055231, 0.179954956, 0.000000000
8, 5.497055231, 0.179954956, 0.200000000
9, 5.497055231, 0.179954956, 0.400000000
10, 5.497055231, 0.179954956, 0.600000000
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*Element, Type=C3D4, Elset=RING
1, 1, 79, 85, 86
2, 1, 85, 7, 86
3, 1, 7, 8, 86
4, 1, 8, 2, 86
5, 1, 2, 80, 86
6, 1, 80, 79, 86
7, 2, 80, 86, 87
8, 2, 86, 8, 87
9, 2, 8, 9, 87
10, 2, 9, 3, 87
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*Nset, Nset=RING_INNER
1, 2, 3, 4, 5, 6, 7, 8, 9, 10
11, 12, 13, 14, 15, 16, 17, 18, 19, 20
21, 22, 23, 24, 25, 26, 27, 28, 29, 30
31, 32, 33, 34, 35, 36, 37, 38, 39, 40
41, 42, 43, 44, 45, 46, 47, 48, 49, 50
51, 52, 53, 54, 55, 56, 57, 58, 59, 60
61, 62, 63, 64, 65, 66, 67, 68, 69, 70
71, 72, 73, 74, 75, 76, 77, 78
*Nset, Nset=PHI0
1, 2, 3, 4, 5, 6, 79, 80, 81, 82
83, 84, 157, 158, 159, 160, 161, 162, 235, 236
237, 238, 239, 240, 313, 314, 315, 316, 317, 318
*Nset, Nset=PHI1
73, 74, 75, 76, 77, 78, 151, 152, 153, 154
155, 156, 229, 230, 231, 232, 233, 234, 307, 308
309, 310, 311, 312, 385, 386, 387, 388, 389, 390
*Nset, Nset=ZBOT
1, 7, 13, 19, 25, 31, 37, 43, 49, 55
61, 67, 73, 79, 85, 91, 97, 103, 109, 115
121, 127, 133, 139, 145, 151, 157, 163, 169, 175
181, 187, 193, 199, 205, 211, 217, 223, 229, 235
241, 247, 253, 259, 265, 271, 277, 283, 289, 295
301, 307, 313, 319, 325, 331, 337, 343, 349, 355
361, 367, 373, 379, 385
*Material, Name=E635
*Elastic
90500, 0.35
*Plastic
434.7, 0.0000
443.8, 0.0020
467.5, 0.0100
485.6, 0.0200
516.3, 0.0500
543.7, 0.1000
573.9, 0.2000
592.7, 0.3000
617.6, 0.5000
653.4, 1.0000
*Damage Initiation, Criterion=Ductile, Evolution=Displacement, Npoints=2
1.0, 0.03, 0.0, 0.1, 1.5, 0.1
*Solid Section, Elset=RING, Material=E635
*Equation
2
151, 2, 0.923879532511, 151, 1, -0.382683432365
2
152, 2, 0.923879532511, 152, 1, -0.382683432365
2
153, 2, 0.923879532511, 153, 1, -0.382683432365
2
154, 2, 0.923879532511, 154, 1, -0.382683432365
2
155, 2, 0.923879532511, 155, 1, -0.382683432365
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*Step, Nlgeom, Inc=20000
*Static
0.01, 1., 1e-07, 0.02
*Boundary
PHI0, 2, 2, 0.
ZBOT, 3, 3, 0.
1, 1, 1, 1.500000000
2, 1, 1, 1.500000000
3, 1, 1, 1.500000000
4, 1, 1, 1.500000000
5, 1, 1, 1.500000000
6, 1, 1, 1.500000000
7, 1, 1, 1.499196881
7, 2, 2, 0.049078624
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*Output, Frequency=10
*Node File
U, RF
*El File
S, E, PEEQ, SDV
*Node Print, Nset=RING_INNER, Totals=Only
RF
*End Step
